// SBML level 2 version 1
// <sbml level="2" version="1" xmlns:sbml="http://www.sbml.org/sbml/level2"  xmlns:math="http://www.w3.org/1998/Math/MathML">
// Model Starts Here

model Lac_V1()
  // Questions can be directed to Adam Halasz halasz@grasp.upenn.edu.
  // Last modified : 2004-06-29

  // Compartments:
  compartment cell = 1.3e-15;

  // Species:
  species M in cell = 6.26e-4; M is "mRNA";  // substance in mM
  species B in cell = 0; B is "Betagalactosidase";  // substance in mM
  species A in cell = 3.8e-2; A is "allolactose";  // substance in mM
  species L in cell = 3.72e-1; L is "lactose_internal";  // substance in mM
  species P in cell = 1.49e-2; P is "permease";  // substance in mM
  species I1 in cell = 0; I1 is "PartialmRNA";  // substance in mM
  species I2 in cell = 0; I2 is "PartialBetagalactosidase";  // substance in mM
  species I3 in cell = 0; I3 is "PartialPermease";  // substance in mM
  species $L_e in cell = 4e-2; L_e is "External_Lactose";  // substance in mM

  // Parameters:
  mu = 2.26e-2 inv_min;
  gamma_M = 0.411 inv_min;
  gamma_B = 8.33e-4 inv_min;
  gamma_A = 0.52 inv_min;
  gamma_0 = 7.25e-7 mM_per_min;
  K = 7.2e3 dimensionless;
  alpha_M = 9.97e-4 mM_per_min;
  tau_B = 2 min;
  alpha_A = 1.76e4 inv_min;
  K_L1 = 1.81 mM;
  alpha_B = 1.66e-2 inv_min;
  K_A = 1.95 mM;
  beta_A = 2.15e4 inv_min;
  tau_M = 0.1 min;
  K_L = 0.97 mM;
  gamma_L = 0 inv_min;
  gamma_P = 0.65 inv_min;
  alpha_L = 2.88e3 inv_min;
  alpha_P = 10 inv_min;
  tau_P = 0.83 min;
  beta_L1 = 2.65e3 inv_min;
  K_Le = 0.26 mM;
  K_1 = 2.52e4 inv_mM_squared;
  R_total = 6.4e-4 mM;

  // Reactions:
  r_m1: => M; gamma_0; r_m1 is "Basal_mRNA_Synthesis";
  r_m2: M => ; M*(gamma_M + mu); r_m2 is "mRNA_Degradation";
  r_m3_i1: I1 => M; I1/tau_M; r_m3_i1 is "allolactose_controlled_mRNA_synthesis";
  r_i1: => I1; alpha_M*((K_1*exp(mu*tau_M*(-2))*A^2 + 1)/(K + K_1*exp(-2*mu*tau_M)*A^2)); r_i1 is "allolactose_controlled_partial_mRNA_synthesis";  // modifiers: A
  r_b1: B => ; B*(gamma_B + mu); r_b1 is "Beta_galactosidase_Degredation";
  r_b2_i2: I2 => B; I2/tau_B; r_b2_i2 is "Beta_galactosidase_synthesis";
  r_i2: => I2; alpha_B*M*exp(-(mu*tau_B)); r_i2 is "Partial_Beta_galactosidase_synthesis";  // modifiers: M
  r_a1: A => ; A*(gamma_A + mu); r_a1 is "Basal_Allolactose_Degredation";
  r_a2: A => ; beta_A*B*(A/(K_A + A)); r_a2 is "Betagalactosidase_mediated_Allolactose_Degredation";  // modifiers: B
  r_a3_l1: L => A; alpha_A*B*(L/(K_L + L)); r_a3_l1 is "Beta_galactosidase_reaction";  // modifiers: B
  r_l2: L => ; L*(gamma_L + mu); r_l2 is "lactose_degredation";
  r_l3: L => ; beta_L1*P*(L/(K_L1 + L)); r_l3 is "Lactose_transport_out";  // modifiers: P
  r_l4: => L; alpha_L*P*(L_e/(K_Le + L_e)); r_l4 is "Lactose_transport_in";  // modifiers: P, L_e
  r_p1: P => ; P*(gamma_P + mu); r_p1 is "permease_degredation";
  r_p2_i3: I3 => P; I3/(tau_B + tau_P); r_p2_i3 is "permease_synthesis";
  r_i3: => I3; alpha_P*M*exp(-1*mu*(tau_B + tau_P)); r_i3 is "partial_permease_synthesis";  // modifiers: M

  // Unit definitions:
  unit inv_min = 1 / (0.01666667 second);
  unit M = mole / litre;
  unit mM = 1e-3 mole / litre;
  unit mM_per_min = 1e-3 mole / (litre * 0.01666667 second);
  unit inv_mM_squared = litre^2 / (1000000 mole)^2;
  unit min = 60 second;
end
