// SBML level 2 version 1

function MichaelisMenten_44(M1, J1, k1, S1)
  k1*S1*M1/(J1 + S1);
end
MichaelisMenten_44 is "Michaelis-Menten";

function Mass_Action_0_45(kf)
  kf;
end

function Michaelis_Menten_46(M1, J1, k1, S1)
  k1*S1*M1/(J1 + S1);
end

function Mass_Action_1_47(kf, S1)
  kf*S1;
end

model New_Mechanism()

  // Compartments:
  compartment cell_0 = 1;

  // Species:
  species Ca in cell_0 = 0;
  species Ci_2 in cell_0 = 1/cell_0;
  species L_3 in cell_0 = 1/cell_0;
  species L2_4 in cell_0 = 0;
  species Ma_5 in cell_0 = 0;
  species Mi_6 in cell_0 = 1/cell_0;
  species Wa_7 in cell_0 = 1/cell_0;
  species Wi_8 in cell_0 = 0;
  species kc_9 in cell_0;
  species kw_10 in cell_0;
  species vcp__11 in cell_0;
  species vcpp__12 in cell_0;
  species vcppp__13 in cell_0;
  species vwp__14 in cell_0;
  species vwpp__15 in cell_0;
  species vwppp__16 in cell_0;
  species kmc__17 in cell_0;
  species kmcr__18 in cell_0;
  species kmw__19 in cell_0;
  species kmwr__20 in cell_0;
  species vc__21 in cell_0;
  species vw__22 in cell_0;
  species Cdc25Total__23 in cell_0;
  species Wee1Total__24 in cell_0;
  species Cdc2Total__25 in cell_0;

  // Parameters:
  Cdc25Total_26 = 1;
  CTotal_27 = 1;
  Dilution_28 = 1;
  kmc_29 = 0.1;
  kmcr_30 = 1;
  kmw_31 = 0.1;
  kmwr_32 = 1;
  TotalCyclin_33 = 1;
  vc_34 = 1;
  vcp_35 = 0.0165;
  vcpp_36 = 0.182;
  vcppp_37 = 0.0709;
  vw_38 = 1;
  vwp_39 = 3e-7;
  vwpp_40 = 0.763;
  vwppp_41 = 0.0709;
  Wee1Total_42 = 1;
  WTotal_43 = 1;

  // Assignment rules:
  Cdc25Total__23 := Cdc25Total_26*Dilution_28;
  Wee1Total__24 := Wee1Total_42*Dilution_28;
  Cdc2Total__25 := Dilution_28;
  vcp__11 := vcp_35*Cdc25Total__23;
  vcpp__12 := vcpp_36*Cdc25Total__23;
  vcppp__13 := vcppp_37/Cdc25Total__23;
  vwp__14 := vwp_39*Wee1Total__24;
  vwpp__15 := vwpp_40*Wee1Total__24;
  vwppp__16 := vwppp_41/Wee1Total__24;
  kmc__17 := kmc_29/Cdc25Total__23;
  kmcr__18 := kmcr_30/Cdc25Total__23;
  kmw__19 := kmw_31/Wee1Total__24;
  kmwr__20 := kmwr_32/Wee1Total__24;
  vc__21 := vc_34*Cdc2Total__25/Cdc25Total__23;
  vw__22 := vw_38*Cdc2Total__25/Wee1Total__24;
  kc_9 := vcp__11*Ci_2 + vcpp__12*Ca;
  kw_10 := vwp__14*Wi_8 + vwpp__15*Wa_7;

  // Algebraic rules:
  0 = Wi_8 + Wa_7 - WTotal_43;
  0 = Ci_2 + Ca - CTotal_27;
  0 = Mi_6 + Ma_5 - TotalCyclin_33;

  // Reactions:
  MPFinactivation_49: Ma_5 => Mi_6; Mass_Action_1_47(kw_10, Ma_5); MPFinactivation_49 is "MPF inactivation";  // modifiers: kw_10
  MPFactivation_50: Mi_6 => Ma_5; Mass_Action_1_47(kc_9, Mi_6); MPFactivation_50 is "MPF activation";  // modifiers: kc_9
  Cdcinactivation_51: Ca => Ci_2; Michaelis_Menten_46(1, kmcr__18, vcppp__13*vc__21, Ca); Cdcinactivation_51 is "Cdc25 inactivation";  // modifiers: kmcr__18, vc__21, vcppp__13
  Cdcactivation_52: Ci_2 => Ca; Michaelis_Menten_46(Ma_5, kmc__17, vc__21, Ci_2); Cdcactivation_52 is "Cdc25 activation";  // modifiers: Ma_5, kmc__17, vc__21
  Weeinactivation_53: Wa_7 => Wi_8; Michaelis_Menten_46(Ma_5, kmw__19, vw__22, Wa_7); Weeinactivation_53 is "Wee1 inactivation";  // modifiers: Ma_5, kmw__19, vw__22
  Weeactivation_54: Wi_8 => Wa_7; Michaelis_Menten_46(1, kmwr__20, vw__22*vwppp__16, Wi_8); Weeactivation_54 is "Wee1 activation";  // modifiers: kmwr__20, vw__22, vwppp__16
  LabelledinactiveMPFaffectedbyCdc_55: L_3 => ; Mass_Action_1_47(kc_9, L_3); LabelledinactiveMPFaffectedbyCdc_55 is "Labelled inactive MPF affected by Cdc25";  // modifiers: kc_9
  LabelledinactiveMPFaffectedbyWee_56: => L2_4; kw_10*(1 - L2_4); LabelledinactiveMPFaffectedbyWee_56 is "Labelled inactive MPF affected by Wee1";  // modifiers: kw_10
end
