// SBML level 2 version 1

model ruleVariableRef()
  // Rule Variable Reference
  // The variable referenced by a rule must be an existing species, compartment, or parameter element.

  // Compartments:
  compartment global;
  compartment variableCompartment;
  compartment rateCompartment;

  // Species:
  species variableSpecies in global;
  species rateSpecies in global;
  species A in global;
  species B in global;
  species C in global;
  species D in global;

  // Parameters:
  rateParameter = ;

  // Assignment rules:
  variableCompartment := 0.01*time;
  foo := 0.01*time;
  variableParameter := 0.01*time;
  variableSpecies := 0.01*time;
  rp0 := 0.01*time;

  // Rate rules:
  rateCompartment' = 0.01*time;
  bar' = 0.01*time;
  rateParameter' = 0.01*time;
  rateSpecies' = 0.01*time;
  rp1' = 0.01*time;

  // Reactions:
  r1: A + B => C; ;  // modifiers: D
end
